*Heading
** Job name: Mesh-fillet-notched-plate Model name: Model-1
** Generated by: Abaqus/CAE 2017
*Preprint, echo=NO, model=NO, history=NO, contact=NO
**
** PARTS
**
*Part, name=Plate-notched
*Node
      1, 0.0148936361, 0.0232168566
      2,  0.075000003, 0.0217702016
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*Element, type=CPS4R
  1,  25,  26, 176, 175
  2,  26,   1,  27, 176
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*Element, type=CPS3
436, 356, 366, 365
*Nset, nset=Set-1, generate
   1,  488,    1
*Elset, elset=Set-1, generate
   1,  436,    1
** Section: Section-1
*Solid Section, elset=Set-1, material=Test
,
*End Part
**
**
** ASSEMBLY
**
*Assembly, name=Assembly
**
*Instance, name=Plate-notched-1, part=Plate-notched
*End Instance
**
*Nset, nset=Bottom, instance=Plate-notched-1
  13,  14,  19,  24, 108, 109
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*Elset, elset=Bottom, instance=Plate-notched-1
 295, 296, 297, 298, 299, 300
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*Nset, nset=Top, instance=Plate-notched-1
  3,  4, 12, 43, 44, 45
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*Elset, elset=Top, instance=Plate-notched-1
  25,  32,  39,  46,  53,  60
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*End Assembly
**
** MATERIALS
**
*Material, name=Test
*Density
1.,
*Elastic
1.,0.
** ----------------------------------------------------------------
**
** STEP: Step-1
**
*Step, name=Step-1, nlgeom=YES
*Dynamic, Explicit
, 4.
*Bulk Viscosity
0.06, 1.2
**
** BOUNDARY CONDITIONS
**
** Name: Velocity - bottom Type: Velocity/Angular velocity
*Boundary, type=VELOCITY
Bottom, 2, 2, -0.001
** Name: Velocity-top Type: Velocity/Angular velocity
*Boundary, type=VELOCITY
Top, 2, 2, 0.001
**
** OUTPUT REQUESTS
**
*Restart, write, number interval=1, time marks=NO
**
** FIELD OUTPUT: F-Output-1
**
*Output, field, variable=PRESELECT
**
** HISTORY OUTPUT: H-Output-1
**
*Output, history, variable=PRESELECT
*End Step
