*Heading
** Job name: Notched-one-opening Model name: Model-1
** Generated by: Abaqus/CAE 2017
*Preprint, echo=NO, model=NO, history=NO, contact=NO
**
** PARTS
**
*Part, name=Plate
*Node
      1,           0.,         145.
      2,          55.,         145.
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*Element, type=CPS4R
 1,   1,  22, 169,  37
 2,  22,  23, 170, 169
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*End Part
**
**
** ASSEMBLY
**
*Assembly, name=Assembly
**
*Instance, name=Plate-1, part=Plate
*End Instance
**
*Nset, nset=Bottom, instance=Plate-1
  11,  12,  15,  16,  87,  88
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*Elset, elset=Bottom, instance=Plate-1
 156, 157, 158, 159, 160, 191, 201, 211, 221, 231, 241, 260, 270, 280, 290, 300
*Elset, elset=Crack, instance=Plate-1
 115,
*Nset, nset=Top, instance=Plate-1
  3,  4,  6, 10, 30, 31
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*Elset, elset=Top, instance=Plate-1
  21,  22,  23,  24,  25,  30,  35,  40,  45,  50,  55,  86,  91,  96, 101, 106
*End Assembly
** ----------------------------------------------------------------
**
** STEP: Step-1
**
*Step, name=Step-1, nlgeom=NO
*Static
1., 1., 1e-05, 1.
**
** BOUNDARY CONDITIONS
**
** Name: Displacement-bottom Type: Displacement/Rotation
*Boundary
Bottom, 2, 2, -0.05
** Name: Displacement-top Type: Displacement/Rotation
*Boundary
Top, 2, 2, 0.05
**
** OUTPUT REQUESTS
**
*Restart, write, frequency=0
**
** FIELD OUTPUT: F-Output-1
**
*Output, field, variable=PRESELECT
**
** HISTORY OUTPUT: H-Output-1
**
*Output, history, variable=PRESELECT
*End Step
