*Heading
** Job name: Plate2hole Model name: Model-1
** Generated by: Abaqus/CAE 2017
*Preprint, echo=NO, model=NO, history=NO, contact=NO
**
** PARTS
**
*Part, name=Plate
*Node
      1,  0.200000003,         -0.5
      2,  0.200000003, -0.100000001
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*Element, type=CPS4R
 1,   1,  18, 151,  43
 2,  18,  19, 152, 151
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*Nset, nset=Plate, generate
   1,  408,    1
*Elset, elset=Plate, generate
   1,  360,    1
** Section: Plate section
*Solid Section, elset=Plate, material=Test
,
*End Part
**
**
** ASSEMBLY
**
*Assembly, name=Assembly
**
*Instance, name=Plate-1, part=Plate
*End Instance
**
*Nset, nset=Bottom, instance=Plate-1
  1,  4,  6, 40, 41, 42, 43, 51, 52, 53, 54, 55, 56, 57
*Elset, elset=Bottom, instance=Plate-1
   1,  11,  21,  31,  41, 123, 124, 125, 126, 127, 128, 129, 130
*Nset, nset=Left, instance=Plate-1
   3,   4,  11,  12,  31,  32
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*Elset, elset=Left, instance=Plate-1
  41,  42,  43,  44,  45,  46
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*Nset, nset=Top, instance=Plate-1
   9,  10,  11, 100, 101, 102, 103, 104, 105, 106, 107, 108, 109, 110
*Elset, elset=Top, instance=Plate-1
 171, 181, 191, 201, 211, 221, 231, 241, 260, 270, 280, 290, 300
*End Assembly
**
** MATERIALS
**
*Material, name=Test
*Density
1.,
*Elastic
1.,0.
** ----------------------------------------------------------------
**
** STEP: Step-1
**
*Step, name=Step-1, nlgeom=YES
*Dynamic, Explicit
, 20.
*Bulk Viscosity
0.06, 1.2
**
** BOUNDARY CONDITIONS
**
** Name: Bottom Type: Velocity/Angular velocity
*Boundary, type=VELOCITY
Bottom, 2, 2, -0.01
** Name: Symmetry Type: Symmetry/Antisymmetry/Encastre
*Boundary
Left, XSYMM
** Name: Top Type: Velocity/Angular velocity
*Boundary, type=VELOCITY
Top, 2, 2, 0.01
**
** OUTPUT REQUESTS
**
*Restart, write, number interval=1, time marks=NO
**
** FIELD OUTPUT: F-Output-1
**
*Output, field, variable=PRESELECT
**
** HISTORY OUTPUT: H-Output-1
**
*Output, history, variable=PRESELECT
*End Step
