*Heading
** Job name: Platewithahole Model name: Model-1
** Generated by: Abaqus/CAE 2017
*Preprint, echo=NO, model=NO, history=NO, contact=NO
**
** PARTS
**
*Part, name=Plate
*Node
      1,          0.5,         -0.5
      2, 0.0353553407, -0.0353553407
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*Element, type=CPS4R
  1,   1,   9, 141,  60
  2,   9,  10, 142, 141
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*Nset, nset=Set-1, generate
   1,  672,    1
*Elset, elset=Set-1, generate
   1,  620,    1
** Section: Plate section
*Solid Section, elset=Set-1, material=Test
,
*End Part
**
**
** ASSEMBLY
**
*Assembly, name=Assembly
**
*Instance, name=Plate-1, part=Plate
*End Instance
**
*Nset, nset=Bottom, instance=Plate-1
  1,  4, 54, 55, 56, 57, 58, 59, 60
*Elset, elset=Bottom, instance=Plate-1, generate
   1,  141,   20
*Nset, nset=Left, instance=Plate-1
   3,   4,   7,   8,  35,  36
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*Elset, elset=Left, instance=Plate-1
 141, 142, 143, 144, 145, 146
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*Nset, nset=Top, instance=Plate-1
   5,   7, 108, 109, 110, 111, 112, 113, 114
*Elset, elset=Top, instance=Plate-1, generate
 480,  620,   20
*End Assembly
**
** MATERIALS
**
*Material, name=Test
*Density
1.,
*Elastic
1.,0.
** ----------------------------------------------------------------
**
** STEP: Step-1
**
*Step, name=Step-1, nlgeom=YES
*Dynamic, Explicit
, 20.
*Bulk Viscosity
0.06, 1.2
**
** BOUNDARY CONDITIONS
**
** Name: Bottom Type: Velocity/Angular velocity
*Boundary, type=VELOCITY
Bottom, 2, 2, -0.005
** Name: Left Type: Displacement/Rotation
*Boundary
Left, 1, 1
** Name: Top Type: Velocity/Angular velocity
*Boundary, type=VELOCITY
Top, 2, 2, 0.005
**
** OUTPUT REQUESTS
**
*Restart, write, number interval=1, time marks=NO
**
** FIELD OUTPUT: F-Output-1
**
*Output, field, variable=PRESELECT
**
** HISTORY OUTPUT: H-Output-1
**
*Output, history, variable=PRESELECT
*End Step
