*Heading
** Job name: Rectangle_fine Model name: Model-1
** Generated by: Abaqus/CAE 2017
*Preprint, echo=NO, model=NO, history=NO, contact=NO
**
** PARTS
**
*Part, name=Part-1
*Node
      1,           0.,           0.
      2,  0.243902445,           0.
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*Element, type=CPS4R
  1,   1,   2,  44,  43
  2,   2,   3,  45,  44
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*Nset, nset=Set-1, generate
   1,  210,    1
*Elset, elset=Set-1, generate
   1,  164,    1
** Section: Section-1
*Solid Section, elset=Set-1, material=Material-1
,
*End Part
**
**
** ASSEMBLY
**
*Assembly, name=Assembly
**
*Instance, name=Part-1-1, part=Part-1
*End Instance
**
*Nset, nset=Left, instance=Part-1-1, generate
   1,  169,   42
*Elset, elset=Left, instance=Part-1-1, generate
   1,  124,   41
*Nset, nset=Right, instance=Part-1-1, generate
  42,  210,   42
*Elset, elset=Right, instance=Part-1-1, generate
  41,  164,   41
*End Assembly
**
** MATERIALS
**
*Material, name=Material-1
*Density
1.,
*Elastic
1.,0.
** ----------------------------------------------------------------
**
** STEP: Step-1
**
*Step, name=Step-1, nlgeom=YES
*Dynamic, Explicit
, 50.
*Bulk Viscosity
0.06, 1.2
**
** BOUNDARY CONDITIONS
**
** Name: BC-1 Type: Velocity/Angular velocity
*Boundary, type=VELOCITY
Left, 1, 1, -0.1
** Name: BC-2 Type: Velocity/Angular velocity
*Boundary, type=VELOCITY
Right, 1, 1, 0.1
**
** OUTPUT REQUESTS
**
*Restart, write, number interval=1, time marks=NO
**
** FIELD OUTPUT: F-Output-1
**
*Output, field, variable=PRESELECT
**
** HISTORY OUTPUT: H-Output-1
**
*Output, history, variable=PRESELECT, frequency=1
*End Step
